*Heading
** Job name: C3D15 Model name: Model-1
** Generated by: Abaqus/CAE 2021
*Preprint, echo=NO, model=NO, history=NO, contact=NO
**
** PARTS
**
*Part, name=Part-1
*Node
      1,          10.,           0.,           0.
      2,           0.,          15.,           0.
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*Element, type=C3D15
   1,   10,   11,   29,   69,   70,   88, 1537, 1536, 1535, 1538, 1539, 1540, 1542, 1541, 1543
   2,   20,    1,    4,   79,   60,   63, 1546, 1545, 1544, 1547, 1548, 1549, 1551, 1550, 1552
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*Nset, nset=top
 1476, 1477, 1478, 1479, 1480, 1481
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*Elset, elset=top, generate
 2113,  2200,     1
*Nset, nset=bottom
    1,    2,    3,    4,    5,    6
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*Elset, elset=bottom, generate
  1,  88,   1
*Nset, nset=RubberSet, generate
    1,  6805,     1
*Elset, elset=RubberSet, generate
    1,  2200,     1
** Section: Section-1
*Solid Section, elset=RubberSet, material=Material-1
,
*End Part
**
**
** ASSEMBLY
**
*Assembly, name=Assembly
**
*Instance, name=Part-1-1, part=Part-1
*End Instance
**
*Node
      1,           0.,           0.,          50.
*Nset, nset=_PickedSet5, internal
 1,
*Nset, nset=_PickedSet7, internal
 1,
*Nset, nset=_PickedSet8, internal, instance=Part-1-1
    1,    2,    3,    4,    5,    6
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*Elset, elset=_PickedSet8, internal, instance=Part-1-1, generate
  1,  88,   1
*Elset, elset=__PickedSurf6_S2, internal, instance=Part-1-1, generate
 2113,  2200,     1
*Surface, type=ELEMENT, name=_PickedSurf6, internal
__PickedSurf6_S2, S2
** Constraint: Constraint-1
*Coupling, constraint name=Constraint-1, ref node=_PickedSet7, surface=_PickedSurf6
*Kinematic
*End Assembly
**
** MATERIALS
**
*Material, name=Material-1
*Density
0.,
*Hyperelastic, neo hooke
 0.25, 0.5
**
** BOUNDARY CONDITIONS
**
** Name: BC-1 Type: Displacement/Rotation
*Boundary
_PickedSet8, 1, 1
_PickedSet8, 2, 2
_PickedSet8, 3, 3
_PickedSet8, 4, 4
_PickedSet8, 5, 5
_PickedSet8, 6, 6
** ----------------------------------------------------------------
**
** STEP: Step-1
**
*Step, name=Step-1, nlgeom=YES
*Static
1., 1., 1e-05, 1.
**
** LOADS
**
** Name: Load-1   Type: Concentrated force
*Cload
_PickedSet5, 2, -1.
**
** OUTPUT REQUESTS
**
*Restart, write, frequency=0
**
** FIELD OUTPUT: F-Output-1
**
*Output, field, variable=PRESELECT
**
** HISTORY OUTPUT: H-Output-1
**
*Output, history, variable=PRESELECT
*End Step
